# 3 variant
1
x := -3 .. 3
E := 10^-4
f(x) := 2*x + sin(x) - 1
root(f(x), E)
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root(f(x), E)
f(x) := e^(x + 1) + x^2 - 4
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2
g(x) := x^4 - 14*x^2 - 40*x - 75
A := [75; 10; 4; -6; 1]
x := polyroots(A) = [-1.13791 + 1.63782i; -1.13791 - 1.63782i; 4.13791 - 1.31709i; 4.13791 + 1.31709i]
3  # a
x1 := 15
x2 := 1
x3 := 15
x4 := 1
Given
9*x1 + 10*x2 - 7*x3 - x4 == 23
7*x1 - x3 - 5*x4 == 37
Find(x1, x2, x3, x4) = [8.14286; 5.57143; 15; 1]
5*x1 - 2*x3 + x4 == 22
4*x1 + x2 + 2*x3 + 3*x4 == 26
b
A := [9, 10, -7, -1; 7, 0, -1, -5; 5, 0, -2, 1; 4, 1, 1, 3]
B := [23; 37; 22; 26]
X := A^-1*B
X = [5.77148; -0.496564; 3.42612; -0.00515464]
c
lsolve(A, B) = [5.77148; -0.496564; 3.42612; -0.00515464]
4
x := 4663
y := 3958934
Given
cos(x) + y == 1
2*x - sin(y - 0.5) == 1
V := Minerr(x, y) = [0.27721; 0.0381772]
Given
cos(x) + y == 1
2*x - sin(y - 0.5) == 1
Find(x, y) = [0.27721; 0.0381772]
