# Лабораторная работа №3
1
limit((y^3 + 3*y^2 + 2*y)/(y^2 - y - 6), y → -2) → -2/5
d/dx(4*sin(2*x)/cos(3*x)^2) + d/dx(sqrt(3*x^2)) → 8*cos(2*x)/cos(3*x)^2 + 24*sin(2*x)*sin(3*x)/cos(3*x)^3 + sqrt(3)*x/sqrt(x^2)
integral(1/sqrt(9 - 25*x^2), x) → asin(5*x/3)/5
2
x := -3 .. 3
E := 10^-4
e^(x + 1) + x^2 - 4
0.354392372658
2*x + sin(x) - 1
0.335418032385
x^4 - 14*x^2 - 40*x - 75
[-3; 5; -1 + 2i; -1 - 2i]
3
x := -5 .. 5
f1(x) := sqrt(x)
f2(x) := e^x
f3(x) := ln(x)
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4
i := 0, 0.5 .. 3
b := -1.74
k := 6
i = [0; 0.5; 1; 1.5; 2; 2.5; 3]
f(i) := if(i < 1.5, cos(i + b), i + k^2)
f(i) = [-0.168397; 0.324796; 0.738469; 37.5; 38; 38.5; 39]
