# Лабораторная работа №4
# 3 variant
№1
A(n, m) :=
    z ← sqrt((3*m + 2)^2 - 24*m)/(3*sqrt(m) - 2/sqrt(m))
    return z
A(4, 5) = 2.23607
A(10, 1000) = 31.6228
A(5, 100) = 10
№2
a := 1.5
x := 0.8, 0.95 .. 2
R(x) :=
    π*x^2 - 7/x^2 if x < 1.3
    a*x^3 + 7*sqrt(x) if x == 1.3
    log(x + 7*sqrt(x)) if x > 1.3
x = [0.8; 0.95; 1.1; 1.25; 1.4; 1.55; 1.7; 1.85; 2]
R(x) = [-8.92688; -4.92095; -1.9838; 0.428739; 0.985988; 1.01136; 1.0345; 1.0558; 1.07553]
№3
i := 0, 0.5 .. 3
k := 6
b := -1.74
R(i) :=
    for j ∈ i
        R ← cos(j + b) if j < 1.5
        R ← j + k^2 if j ≥ 1.5
    return R
i = [0; 0.5; 1; 1.5; 2; 2.5; 3]
R(i) = [-0.168397; 0.324796; 0.738469; 37.5; 38; 38.5; 39]
