# Лабработорная работа №1 студента Квит Кирилл
2
а
4*sqrt(5 - 2*sqrt(6))/((nthroot(2, 4) + nthroot(3, 4))*(nthroot(3, 4) - nthroot(2, 4))) = 4
б
n := 3
x := 5
y := (sqrt(x^3 + n) + cos(|n*x - 1|))/nthroot(x^5 + 8*x + n, 4)
y = 1.52625
в
t := (sum(sin(i/n), i = 1 .. 10) + sum((i - n)/(i + n), i = 1 .. 5))/product((n + 3*i)/(n^2 + n*i - n), i = 1 .. 5)
t = 19.2061
3
x := -2, -1.8 .. 2
y(x) := 4*sin(2*x)/cos(3*x)^2 + sqrt(3*x^2)
x = [-2; -1.8; -1.6; -1.4; -1.2; -1; -0.8; -0.6; -0.4; -0.2; 0; 0.2; 0.4; 0.6; 0.8; 1; 1.2; 1.4; 1.6; 1.8; 2]
y(x) = [6.74767; 7.51175; 33.2695; -3.15; -1.28132; -1.97904; -5.96755; -71.1828; -21.1606; -1.94032; 0; 2.63314; 22.5463; 73.2612; 8.73883; 5.44315; 5.43824; 7.99975; -27.7269; -1.27637; 0.180534]
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4
A := [1, 2, 5; 45, 5, 3; 6, 8, 9]
B := [12, 45, 4; 4, 3, 5; 34, 34, 53]
V := [3; 4; 4]
C := A*B
C = [190, 221, 279; 662, 2142, 364; 410, 600, 541]
d := |A|*|B|
d = -1691742
g := transpose(V)*A*V
g = 1105
S := B*V
S = [232; 44; 450]
E := A^-1*C - B
E = [0, 7.10543e-15, 0; 1.42109e-14, 0, 0; -7.10543e-15, 0, 7.10543e-15]
q := max(A)
q = 45
p := min(B)
p = 3
5
a := π/6
b := π
INT := integral(cos(t^3)^2 + sqrt(10*t^2), t = a .. b)
INT = 16.5211
6
x := -6, -5.8 .. 6
y := -6, -5.8 .. 6
f(x, y) := e^(sin(x) + sin(y))
# [component: inputs f]
