x := -2, -1.8 .. 2
y(x) := (0 + (x*sin(2*x))/(1 + cos(3*x))) + (0 + 1/5)*tan(2*x)^3
x = [-2; -1.8; -1.6; -1.4; -1.2; -1; -0.8; -0.6; -0.4; -0.2; 0; 0.2; 0.4; 0.6; 0.8; 1; 1.2; 1.4; 1.6; 1.8; 2]
y(x) = [-1.0826; -0.511303; -0.0859239; 0.929034; 8.00478; 92.948; 8026.24; -2.67982; -0.00769347; 0.0275529; 0; 0.0577833; 0.428937; 4.12709; -8020.15; 88.7751; 7.69734; 0.911058; -0.0858439; -0.463237; -0.461757]
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