A := [3, 2, 1; 0, 4, 2; 3, 1, 0]
B := [4, 2, 1; 5, 3, 1; 6, 4, 2]
V := [2; 5; 6]
C := A*B
C = [28, 16, 7; 32, 20, 8; 17, 9, 4]
d := |A|*|B|
d = -12
g := transpose(V)*A*V
g = 270
S := B*V
S = [24; 31; 44]
E := A^-1*C - B
E = [-8.88178e-16, 0, -2.22045e-16; 0, 0, 0; 0, 0, 0]
q := max(A)
q = 4
p := min(B)
p = 1
