# A | Лабараторная работа №4
№1
A(n, m) :=
    z ← sqrt((3*m + 2)^2 - 24*m)/(3*sqrt(m) - 2/sqrt(m))
    return z
A(4, 5) = 2.23607
A(10, 1000) = 31.6228
№2
a := 2.6
b := -0.39
x := 0, 0.5 .. 7
R(x) :=
    (a + b)/(exp(x) + cos(x)) if x < 2.8
    if {
        x < 6
        x ≥ 2.8
    }
        (a + b)/(x + 1)
    exp(x) + sin(x) if x ≥ 6
R(x) = [1.105; 0.874796; 0.678209; 0.485455; 0.316941; 0.194177; 0.5525; 0.491111; 0.442; 0.401818; 0.368333; 0.34; 403.149; 665.357; 1097.29]
№3
i := 1, 1.2 .. 2
y := 2.92
x := 6.96*10^-11
R(c) == {
    i + y if i < 1.5
    i + x^2 if i ≥ 1.5
}
R(i) = [0.678209; 0.60014; 0.523056; 0.448837; 0.379566; 0.316941]
